P1 := 498*10^3
P2 := 502*10^3
N1 := 496*10^3  # disabled
N2 := 504*10^3  # disabled
N1 := 496*10^3 - 3.5*10^5 = 146000
N2 := 504*10^3 + 3.5*10^5 = 854000
γ := 0.01
f := 7*10^6
A := -20*log(γ) = 40
Fh := N1/f + (P1 - N1)/(2*f) = 0.046
β :=
    0.1102*(A - 8.7) if A > 50
    0.5842*(A - 21)^0.4 + 0.07886*(A - 21) if 21 ≤ A ≤ 50
    0 otherwise
    = 3.39532
Fb := P2/f + (N2 - P2)/(2*f) = 0.0968571
N2 := Fb*2*f - P2  # disabled
|N2 - 1.204*10^6| = 350000
7*10^5/2 = 350000
ΔFpn := |Fb - Fh| = 0.0508571
N := 2*ceil((ceil((A - 7.95)/14.36*1/ΔFpn) + 1)/2) + 1 = 47
α := (N - 1)/2 = 23
n := 0 .. 1000
hd(n) :=
    2*Fb*sin((n - α)*Fb*2*π)/((n - α)*(Fb*2*π)) - 2*Fh*sin((n - α)*(Fh*2*π))/((n - α)*(Fh*2*π)) if n ≠ α and n < 48
    2*Fb - 2*Fh if n == α
    0 otherwise
hd(n) =  # no stored result
p := 48 .. 50
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w(n) := J0(β*(1 - (2*(n - α)/N)^2)^(1/2))/J0(β)
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h(n) := hd(n)*w(n)
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h(n) =  # no stored result
H(z) := sum(h(k)*z^(-k), k = 0 .. N - 1)
z[n] := h(n)
G := CFFT(z)
Ω[n] := n/N
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P1*2*π/f = 0.447004
N1*2*π/f = 0.131049
P2*2*π/f = 0.450594
N2*2*π/f = 0.766549
